<?xml version="1.0"?>
<?xml-stylesheet type="text/xsl" href="http://jsbsim.sourceforge.net/JSBSim.xsl"?>
<fdm_config name="Il-96-400M" version="2.0" release="ALPHA"
   xmlns:xsi="http://www.w3.org/2001/XMLSchema-instance"
   xsi:noNamespaceSchemaLocation="http://jsbsim.sourceforge.net/JSBSim.xsd">

	<fileheader>
		<author> Aeromatic v 0.96 </author>
		<filecreationdate>2020-08-08</filecreationdate>
		<version>$Revision: 1.20 $</version>
		<description> Models a Il-96-400M. </description>
	</fileheader>

	<!--
		File:     Il-96-400M.xml
		Inputs:
			name:          Il-96-400M
			type:          four-engine transonic transport
			max weight:    583500 lb
			wing span:     197.25 ft
			length:        209.75 ft
			wing area:     3767.75 sq-ft
			gear type:     tricycle
			castering:     1
			retractable?:  yes
			# engines:     4
			engine type:   turbine
			engine layout: wings
			yaw damper?    yes
		Outputs:
			wing loading:  154.87 lb/sq-ft
			payload:       69630.5 lbs
			CL-alpha:      4.4 per radian
			CL-0:          0.2
			CL-max:        1.2
			CD-0:          0.017
			K:             0.042

	-->

	<metrics>
		<wingarea  unit="FT2"> 3767.75 </wingarea>
		<wingspan  unit="FT" >  197.25 </wingspan>
		<wing_incidence>          2.00 </wing_incidence>
		<chord     unit="FT" >   19.10 </chord>
		<htailarea unit="FT2">  941.94 </htailarea>
		<htailarm  unit="FT" >   94.39 </htailarm>
		<vtailarea unit="FT2">  753.55 </vtailarea>
		<vtailarm  unit="FT" >   94.39 </vtailarm>

		<location name="AERORP" unit="IN">
			<x> 1384.35 </x>
			<y>   0.00 </y>
			<z>   0.00 </z>
		</location>

		<location name="EYEPOINT" unit="IN">
			<x> 176.19 </x>
			<y> -32.00 </y>
			<z>  80.00 </z>
		</location>

		<location name="VRP" unit="IN">
			<x>0</x>
			<y>0</y>
			<z>-20.00</z>
		</location>

	</metrics>

	<mass_balance>
		<ixx unit="SLUG*FT2">   8332749 </ixx>
		<iyy unit="SLUG*FT2">  10636925 </iyy>
		<izz unit="SLUG*FT2">  19132815 </izz>
		<emptywt unit="LBS" >    269383 </emptywt>

		<location name="CG" unit="IN">
			<x> 1384.35 </x>
			<y>   0.00 </y>
			<z> -62.93 </z>
		</location>

		<pointmass name="Cockpit Crew">
			<description>Cockpit Crew, incl. opt. 3rd person</description>
			<weight unit="LBS">  660 </weight>
			<location name="POINTMASS" unit="IN">
				<x> 36.00 </x>
				<y>   0.00 </y>
				<z> -62.93 </z>
			</location>
		</pointmass>

		<pointmass name="Cabin Crew 1st Class">
			<description>2 flight attendants</description>
			<weight unit="LBS">  440 </weight>
			<location name="POINTMASS" unit="IN">
				<x> 1384.35 </x>
				<y>   0.00 </y>
				<z> -62.93 </z>
			</location>
		</pointmass>

		<pointmass name="Pax 1st Class">
			<description>24 passengers</description>
			<weight unit="LBS">5280</weight>
			<location name="POINTMASS" unit="IN">
				<x> 1384.35 </x>
				<y>   0.00 </y>
				<z> -62.93 </z>
			</location>
		</pointmass>

		<pointmass name="Cabin Crew Business Class">
			<description>2 flight attendants</description>
			<weight unit="LBS">  440 </weight>
			<location name="POINTMASS" unit="IN">
				<x> 1384.35 </x>
				<y>   0.00 </y>
				<z> -62.93 </z>
			</location>
		</pointmass>

		<pointmass name="Pax Business Class">
			<description>66 passengers</description>
			<weight unit="LBS">14520</weight>
			<location name="POINTMASS" unit="IN">
				<x> 1384.35 </x>
				<y>   0.00 </y>
				<z> -62.93 </z>
			</location>
		</pointmass>

		<pointmass name="Cabin Crew Economy Section I">
			<description>3 flight attendants</description>
			<weight unit="LBS">  660 </weight>
			<location name="POINTMASS" unit="IN">
				<x> 1384.35 </x>
				<y>   0.00 </y>
				<z> -62.93 </z>
			</location>
		</pointmass>

		<pointmass name="Pax Economy Section I">
			<description>171 passengers</description>
			<weight unit="LBS">37620</weight>
			<location name="POINTMASS" unit="IN">
				<x> 1384.35 </x>
				<y>   0.00 </y>
				<z> -62.93 </z>
			</location>
		</pointmass>

		<pointmass name="Cabin Crew Economy Section II">
			<description>3 flight attendants</description>
			<weight unit="LBS">  660 </weight>
			<location name="POINTMASS" unit="IN">
				<x> 1384.35 </x>
				<y>   0.00 </y>
				<z> -62.93 </z>
			</location>
		</pointmass>

		<pointmass name="Pax Economy Section II">
			<description>89 passengers</description>
			<weight unit="LBS">19580</weight>
			<location name="POINTMASS" unit="IN">
				<x> 1384.35 </x>
				<y>   0.00 </y>
				<z> -62.93 </z>
			</location>
		</pointmass>

		<pointmass name="Luggage and Cargo">
			<description>16 LD3 containers, up to 1312.4 lbs ea.</description>
			<weight unit="LBS">21000</weight>
			<location name="POINTMASS" unit="IN">
				<x> 1384.35 </x>
				<y>   0.00 </y>
				<z> -62.93 </z>
			</location>
		</pointmass>

	</mass_balance>

	<ground_reactions>

		<contact type="BOGEY" name="NOSE">
			<location unit="IN">
				<x> 327.21 </x>
				<y>   0.00 </y>
				<z> -242.04 </z>
			</location>
			<static_friction>  0.80 </static_friction>
			<dynamic_friction> 0.50 </dynamic_friction>
			<rolling_friction> 0.02 </rolling_friction>
			<spring_coeff unit="LBS/FT">      175050.00 </spring_coeff>
			<damping_coeff unit="LBS/FT/SEC"> 87525.00 </damping_coeff>
			<break_group>NONE</break_group>
			<max_steer unit="DEG">45</max_steer>
			<retractable>1</retractable>
		</contact>

		<contact type="BOGEY" name="LEFT_MAIN">
			<location unit="IN">
				<x> 1439.72 </x>
				<y> -213.03 </y>
				<z> -252.04 </z>
			</location>
			<static_friction>  0.80 </static_friction>
			<dynamic_friction> 0.50 </dynamic_friction>
			<rolling_friction> 0.02 </rolling_friction>
			<spring_coeff unit="LBS/FT">      583500.00 </spring_coeff>
			<damping_coeff unit="LBS/FT/SEC"> 291750.00 </damping_coeff>
			<max_steer unit="DEG">0</max_steer>
			<brake_group>LEFT</brake_group>
			<retractable>1</retractable>
		</contact>

		<contact type="BOGEY" name="CENTER_MAIN">
			<location unit="IN">
				<x> 1439.72 </x>
				<y> 0.00 </y>
				<z> -252.04 </z>
			</location>
			<static_friction>  0.80 </static_friction>
			<dynamic_friction> 0.50 </dynamic_friction>
			<rolling_friction> 0.02 </rolling_friction>
			<spring_coeff unit="LBS/FT">      583500.00 </spring_coeff>
			<damping_coeff unit="LBS/FT/SEC"> 291750.00 </damping_coeff>
			<max_steer unit="DEG">0</max_steer>
			<brake_group>CENTER</brake_group>
			<retractable>1</retractable>
		</contact>

		<contact type="BOGEY" name="RIGHT_MAIN">
			<location unit="IN">
				<x> 1439.72 </x>
				<y> 213.03 </y>
				<z> -252.04 </z>
			</location>
			<static_friction>  0.80 </static_friction>
			<dynamic_friction> 0.50 </dynamic_friction>
			<rolling_friction> 0.02 </rolling_friction>
			<spring_coeff unit="LBS/FT">      583500.00 </spring_coeff>
			<damping_coeff unit="LBS/FT/SEC"> 291750.00 </damping_coeff>
			<max_steer unit="DEG">0</max_steer>
			<brake_group>RIGHT</brake_group>
			<retractable>1</retractable>
		</contact>

		<contact type="STRUCTURE" name="LEFT_WING">
			<location unit="IN">
				<x> 1384.35 </x>
				<y> -98.62 </y>
				<z> -242.93 </z>
			</location>
			<static_friction>  1.00 </static_friction>
			<dynamic_friction> 1.00 </dynamic_friction>
			<spring_coeff unit="LBS/FT">      583500.00 </spring_coeff>
			<damping_coeff unit="LBS/FT/SEC"> 583500.00 </damping_coeff>
		</contact>

		<contact type="STRUCTURE" name="RIGHT_WING">
			<location unit="IN">
				<x> 1384.35 </x>
				<y>  98.62 </y>
				<z> -242.93 </z>
			</location>
			<static_friction>  1.00 </static_friction>
			<dynamic_friction> 1.00 </dynamic_friction>
			<spring_coeff unit="LBS/FT">      583500.00 </spring_coeff>
			<damping_coeff unit="LBS/FT/SEC"> 583500.00 </damping_coeff>
		</contact>

	</ground_reactions>

	<propulsion>

		<engine file="Aviadvigatel PS-90A1">
			<location unit="IN">
				<x> 1384.35 </x>
				<y> -394.50 </y>
				<z> -40.00 </z>
			</location>
			<orient unit="DEG">
				<pitch> 0.00 </pitch>
				<roll>  0.00 </roll>
				<yaw>   0.00 </yaw>
			</orient>
			<feed>0</feed>
			<thruster file="direct">
				<location unit="IN">
					<x> 1384.35 </x>
					<y> -394.50 </y>
					<z> -40.00 </z>
				</location>
				<orient unit="DEG">
					<pitch> 0.00 </pitch>
					<roll>  0.00 </roll>
					<yaw>   0.00 </yaw>
				</orient>
			</thruster>
		</engine>

		<engine file="Aviadvigatel PS-90A1">
			<location unit="IN">
				<x> 1384.35 </x>
				<y> -394.50 </y>
				<z> -40.00 </z>
			</location>
			<orient unit="DEG">
				<pitch> 0.00 </pitch>
				<roll>  0.00 </roll>
				<yaw>   0.00 </yaw>
			</orient>
			<feed>0</feed>
			<thruster file="direct">
				<location unit="IN">
					<x> 1384.35 </x>
					<y> -394.50 </y>
					<z> -40.00 </z>
				</location>
				<orient unit="DEG">
					<pitch> 0.00 </pitch>
					<roll>  0.00 </roll>
					<yaw>   0.00 </yaw>
				</orient>
			</thruster>
		</engine>

		<engine file="Aviadvigatel PS-90A1">
			<location unit="IN">
				<x> 1384.35 </x>
				<y> 394.50 </y>
				<z> -40.00 </z>
			</location>
			<orient unit="DEG">
				<pitch> 0.00 </pitch>
				<roll>  0.00 </roll>
				<yaw>   0.00 </yaw>
			</orient>
			<feed>1</feed>
			<thruster file="direct">
				<location unit="IN">
					<x> 1384.35 </x>
					<y> 394.50 </y>
					<z> -40.00 </z>
				</location>
				<orient unit="DEG">
					<pitch> 0.00 </pitch>
					<roll>  0.00 </roll>
					<yaw>   0.00 </yaw>
				</orient>
			</thruster>
		</engine>

		<engine file="Aviadvigatel PS-90A1">
			<location unit="IN">
				<x> 1384.35 </x>
				<y> 394.50 </y>
				<z> -40.00 </z>
			</location>
			<orient unit="DEG">
				<pitch> 0.00 </pitch>
				<roll>  0.00 </roll>
				<yaw>   0.00 </yaw>
			</orient>
			<feed>1</feed>
			<thruster file="direct">
				<location unit="IN">
					<x> 1384.35 </x>
					<y> 394.50 </y>
					<z> -40.00 </z>
				</location>
				<orient unit="DEG">
					<pitch> 0.00 </pitch>
					<roll>  0.00 </roll>
					<yaw>   0.00 </yaw>
				</orient>
			</thruster>
		</engine>

		<tank type="FUEL" number="0">
			<location unit="IN">
				<x> 1384.35 </x>
				<y> -394.50 </y>
				<z> -40.00 </z>
			</location>
			<priority>1</priority>
			<capacity unit="LBS">  135078.70  </capacity>
			<contents unit="LBS">  135078.70  </contents>
			<type>JET-A1</type>
		</tank>

		<tank type="FUEL" number="1">
			<location unit="IN">
				<x> 1384.35 </x>
				<y> 394.50 </y>
				<z> -40.00 </z>
			</location>
			<priority>1</priority>
			<capacity unit="LBS">  135078.70  </capacity>
			<contents unit="LBS">  135078.70  </contents>
			<type>JET-A1</type>
		</tank>

	</propulsion>

	<system file="NWS"/>
	<system file="pushback"/>

	<flight_control name="FCS: Il-96-400M">

		<channel name="Pitch">

			<summer name="Pitch Trim Sum">
				<input>fcs/elevator-cmd-norm</input>
				<input>fcs/pitch-trim-cmd-norm</input>
				<clipto>
					<min> -1 </min>
					<max>  1 </max>
				</clipto>
			</summer>

			<aerosurface_scale name="Elevator Control">
				<input>fcs/pitch-trim-sum</input>
				<range>
					<min> -0.35 </min>
					<max>  0.35 </max>
				</range>
				<output>fcs/elevator-pos-rad</output>
			</aerosurface_scale>

			<aerosurface_scale name="elevator normalization">
				<input>fcs/elevator-pos-rad</input>
				<domain>
					<min> -0.35 </min>
					<max>  0.35 </max>
				</domain>
				<range>
					<min> -1 </min>
					<max>  1 </max>
				</range>
				<output>fcs/elevator-pos-norm</output>
			</aerosurface_scale>

		</channel>

		<channel name="Roll">

			<summer name="Roll Trim Sum">
				<input>fcs/aileron-cmd-norm</input>
				<input>fcs/roll-trim-cmd-norm</input>
				<clipto>
					<min> -1 </min>
					<max>  1 </max>
				</clipto>
			</summer>

			<aerosurface_scale name="Left Aileron Control">
				<input>fcs/roll-trim-sum</input>
				<range>
					<min> -0.35 </min>
					<max>  0.35 </max>
				</range>
				<output>fcs/left-aileron-pos-rad</output>
			</aerosurface_scale>

			<aerosurface_scale name="Right Aileron Control">
				<input>fcs/roll-trim-sum</input>
				<range>
					<min> -0.35 </min>
					<max>  0.35 </max>
				</range>
				<output>fcs/right-aileron-pos-rad</output>
			</aerosurface_scale>

			<aerosurface_scale name="left aileron normalization">
				<input>fcs/left-aileron-pos-rad</input>
				<domain>
					<min> -0.35 </min>
					<max>  0.35 </max>
				</domain>
				<range>
					<min> -1 </min>
					<max>  1 </max>
				</range>
				<output>fcs/left-aileron-pos-norm</output>
			</aerosurface_scale>

			<aerosurface_scale name="right aileron normalization">
				<input>fcs/right-aileron-pos-rad</input>
				<domain>
					<min> -0.35 </min>
					<max>  0.35 </max>
				</domain>
				<range>
					<min> -1 </min>
					<max>  1 </max>
				</range>
				<output>fcs/right-aileron-pos-norm</output>
			</aerosurface_scale>

		</channel>

		<property value="1">fcs/yaw-damper-enable</property>

		<channel name="Yaw">

			<summer name="Rudder Command Sum">
				<input>fcs/rudder-cmd-norm</input>
				<input>fcs/yaw-trim-cmd-norm</input>
				<clipto>
					<min> -1 </min>
					<max>  1 </max>
				</clipto>
			</summer>

			<scheduled_gain name="Yaw Damper Rate">
				<input>velocities/r-aero-rad_sec</input>
				<table>
					<independentVar lookup="row">velocities/ve-kts</independentVar>
					<tableData>
						30     0.00
						60     2.00
					</tableData>
				</table>
				<gain>fcs/yaw-damper-enable</gain>
			</scheduled_gain>

			<summer name="Rudder Sum">
				<input>fcs/rudder-command-sum</input>
				<input>fcs/yaw-damper-rate</input>
				<clipto>
					<min> -1.1 </min>
					<max>  1.1 </max>
				</clipto>
			</summer>

			<aerosurface_scale name="Rudder Control">
				<input>fcs/rudder-sum</input>
				<domain>
					<min> -1.1 </min>
					<max>  1.1 </max>
				</domain>
				<range>
					<min> -0.35 </min>
					<max>  0.35 </max>
				</range>
				<output>fcs/rudder-pos-rad</output>
			</aerosurface_scale>

			<aerosurface_scale name="rudder normalization">
				<input>fcs/rudder-pos-rad</input>
				<domain>
					<min> -0.35 </min>
					<max>  0.35 </max>
				</domain>
				<range>
					<min> -1 </min>
					<max>  1 </max>
				</range>
				<output>fcs/rudder-pos-norm</output>
			</aerosurface_scale>

		</channel>

		<channel name="Flaps">

			<kinematic name="Flaps Control">
				<input>fcs/flap-cmd-norm</input>
				<traverse>
					<setting>
						<position>  0 </position>
						<time>      0 </time>
					</setting>
					<setting>
						<position> 15 </position>
						<time>      4 </time>
					</setting>
					<setting>
						<position> 30 </position>
						<time>      3 </time>
					</setting>
				</traverse>
				<output>fcs/flap-pos-deg</output>
			</kinematic>

			<aerosurface_scale name="flap normalization">
				<input>fcs/flap-pos-deg</input>
				<domain>
					<min>  0 </min>
					<max> 30 </max>
				</domain>
				<range>
					<min> 0 </min>
					<max> 1 </max>
				</range>
				<output>fcs/flap-pos-norm</output>
			</aerosurface_scale>

		</channel>

		<channel name="Landing Gear">

			<kinematic name="Gear Control">
				<input>gear/gear-cmd-norm</input>
				<traverse>
					<setting>
						<position> 0 </position>
						<time>     0 </time>
					</setting>
					<setting>
						<position> 1 </position>
						<time>     5 </time>
					</setting>
				</traverse>
				<output>gear/gear-pos-norm</output>
			</kinematic>

		</channel>

		<channel name="Speedbrake">

			<kinematic name="Speedbrake Control">
				<input>fcs/speedbrake-cmd-norm</input>
				<traverse>
					<setting>
						<position> 0 </position>
						<time>     0 </time>
					</setting>
					<setting>
						<position> 1 </position>
						<time>     1 </time>
					</setting>
				</traverse>
				<output>fcs/speedbrake-pos-norm</output>
			</kinematic>

		</channel>

	</flight_control>

	<aerodynamics>

		<axis name="LIFT">

			<function name="aero/force/Lift_alpha">
				<description>Lift due to alpha</description>
				<product>
					<property>aero/qbar-psf</property>
					<property>metrics/Sw-sqft</property>
					<table>
				        	<independentVar lookup="row">aero/alpha-rad</independentVar>
						<tableData>
							-0.20 -0.968
							 0.00  0.440
							 0.23  1.540
					 		 0.60  0.968
						</tableData>
					</table>
				</product>
			</function>

			<function name="aero/force/Lift_flap">
				<description>Delta Lift due to flaps</description>
				<product>
					<property>aero/qbar-psf</property>
					<property>metrics/Sw-sqft</property>
					<property>fcs/flap-pos-deg</property>
					<value> 0.05000 </value>
				</product>
			</function>

			<function name="aero/force/Lift_speedbrake">
				<description>Delta Lift due to speedbrake</description>
				<product>
					<property>aero/qbar-psf</property>
					<property>metrics/Sw-sqft</property>
					<property>fcs/speedbrake-pos-norm</property>
					<value>-0.08</value>
				</product>
			</function>

			<function name="aero/force/Lift_elevator">
				<description>Lift due to Elevator Deflection</description>
				<product>
					<property>aero/qbar-psf</property>
					<property>metrics/Sw-sqft</property>
					<property>fcs/elevator-pos-rad</property>
					<value>0.2</value>
				</product>
			</function>

		</axis>

		<axis name="DRAG">

			<function name="aero/force/Drag_basic">
				<description>Drag at zero lift</description>
				<product>
					<property>aero/qbar-psf</property>
					<property>metrics/Sw-sqft</property>
					<table>
						<independentVar lookup="row">aero/alpha-rad</independentVar>
						<tableData>
							-1.57    1.500
							-0.26    0.022
							 0.00    0.017
							 0.26    0.022
							 1.57    1.500
						</tableData>
					</table>
				</product>
			</function>

			<function name="aero/force/Drag_induced">
				<description>Induced drag</description>
				<product>
					<property>aero/qbar-psf</property>
					<property>metrics/Sw-sqft</property>
					<property>aero/cl-squared</property>
					<value>0.042</value>
				</product>
			</function>

			<function name="aero/force/Drag_mach">
				<description>Drag due to mach</description>
				<product>
					<property>aero/qbar-psf</property>
					<property>metrics/Sw-sqft</property>
					<table>
						<independentVar lookup="row">velocities/mach</independentVar>
						<tableData>
							0.00      0.000
							0.79      0.000
							1.10      0.023
							1.80      0.015
						</tableData>
					</table>
				</product>
			</function>

			<function name="aero/force/Drag_flap">
				<description>Drag due to flaps</description>
				<product>
					<property>aero/qbar-psf</property>
					<property>metrics/Sw-sqft</property>
					<property>fcs/flap-pos-deg</property>
					<value> 0.00183 </value>
				</product>
			</function>

			<function name="aero/force/Drag_gear">
				<description>Drag due to gear</description>
				<product>
					<property>aero/qbar-psf</property>
					<property>metrics/Sw-sqft</property>
					<property>gear/gear-pos-norm</property>
					<value>0.011</value>
				</product>
			</function>

			<function name="aero/force/Drag_speedbrake">
				<description>Drag due to speedbrakes</description>
				<product>
					<property>aero/qbar-psf</property>
					<property>metrics/Sw-sqft</property>
					<property>fcs/speedbrake-pos-norm</property>
					<value>0.017</value>
				</product>
			</function>

			<function name="aero/force/Drag_beta">
				<description>Drag due to sideslip</description>
				<product>
					<property>aero/qbar-psf</property>
					<property>metrics/Sw-sqft</property>
					<table>
						<independentVar lookup="row">aero/beta-rad</independentVar>
						<tableData>
							-1.57    1.230
							-0.26    0.050
							 0.00    0.000
							 0.26    0.050
							 1.57    1.230
						</tableData>
					</table>
				</product>
			</function>

			<function name="aero/force/Drag_elevator">
				<description>Drag due to Elevator Deflection</description>
				<product>
					<property>aero/qbar-psf</property>
					<property>metrics/Sw-sqft</property>
					<abs>
						<property>fcs/elevator-pos-norm</property>
					</abs>
					<value>0.04</value>
				</product>
			</function>

		</axis>

		<axis name="SIDE">

			<function name="aero/force/Side_beta">
				<description>Side force due to beta</description>
				<product>
					<property>aero/qbar-psf</property>
					<property>metrics/Sw-sqft</property>
					<property>aero/beta-rad</property>
					<value>-1</value>
				</product>
			</function>

		</axis>

		<axis name="ROLL">

			<function name="aero/moment/Roll_beta">
				<description>Roll moment due to beta</description>
				<product>
					<property>aero/qbar-psf</property>
					<property>metrics/Sw-sqft</property>
					<property>metrics/bw-ft</property>
					<property>aero/beta-rad</property>
					<value>-0.1</value>
				</product>
			</function>

			<function name="aero/moment/Roll_damp">
				<description>Roll moment due to roll rate</description>
				<product>
					<property>aero/qbar-psf</property>
					<property>metrics/Sw-sqft</property>
					<property>metrics/bw-ft</property>
					<property>aero/bi2vel</property>
					<property>velocities/p-aero-rad_sec</property>
					<value>-0.4</value>
				</product>
			</function>

			<function name="aero/moment/Roll_yaw">
				<description>Roll moment due to yaw rate</description>
				<product>
					<property>aero/qbar-psf</property>
					<property>metrics/Sw-sqft</property>
					<property>metrics/bw-ft</property>
					<property>aero/bi2vel</property>
					<property>velocities/r-aero-rad_sec</property>
					<value>0.15</value>
				</product>
			</function>

			<function name="aero/moment/Roll_aileron">
				<description>Roll moment due to aileron</description>
				<product>
					<property>aero/qbar-psf</property>
					<property>metrics/Sw-sqft</property>
					<property>metrics/bw-ft</property>
					<property>fcs/left-aileron-pos-rad</property>
					<value>0.1</value>
				</product>
			</function>

			<function name="aero/moment/Roll_rudder">
				<description>Roll moment due to rudder</description>
				<product>
					<property>aero/qbar-psf</property>
					<property>metrics/Sw-sqft</property>
					<property>metrics/bw-ft</property>
					<property>fcs/rudder-pos-rad</property>
					<value>0.01</value>
				</product>
			</function>

		</axis>

		<axis name="PITCH">

			<function name="aero/moment/Pitch_alpha">
				<description>Pitch moment due to alpha</description>
				<product>
					<property>aero/qbar-psf</property>
					<property>metrics/Sw-sqft</property>
					<property>metrics/cbarw-ft</property>
					<property>aero/alpha-rad</property>
					<value>-0.7</value>
				</product>
			</function>

			<function name="aero/moment/Pitch_elevator">
				<description>Pitch moment due to elevator</description>
				<product>
					<property>aero/qbar-psf</property>
					<property>metrics/Sw-sqft</property>
					<property>metrics/cbarw-ft</property>
					<property>fcs/elevator-pos-rad</property>
					<table>
						<independentVar lookup="row">velocities/mach</independentVar>
						<tableData>
							0.0     -1.300
							2.0     -0.325
						</tableData>
					</table>
				</product>
			</function>

    			<function name="aero/moment/Pitch_damp">
				<description>Pitch moment due to pitch rate</description>
				<product>
					<property>aero/qbar-psf</property>
					<property>metrics/Sw-sqft</property>
					<property>metrics/cbarw-ft</property>
					<property>aero/ci2vel</property>
					<property>velocities/q-aero-rad_sec</property>
					<value>-21</value>
				</product>
			</function>

			<function name="aero/moment/Pitch_alphadot">
				<description>Pitch moment due to alpha rate</description>
				<product>
					<property>aero/qbar-psf</property>
					<property>metrics/Sw-sqft</property>
					<property>metrics/cbarw-ft</property>
					<property>aero/ci2vel</property>
					<property>aero/alphadot-rad_sec</property>
					<value>-4</value>
				</product>
			</function>

		</axis>

		<axis name="YAW">

			<function name="aero/moment/Yaw_beta">
				<description>Yaw moment due to beta</description>
				<product>
					<property>aero/qbar-psf</property>
					<property>metrics/Sw-sqft</property>
					<property>metrics/bw-ft</property>
					<property>aero/beta-rad</property>
					<value>0.12</value>
				</product>
			</function>

			<function name="aero/moment/Yaw_damp">
				<description>Yaw moment due to yaw rate</description>
				<product>
					<property>aero/qbar-psf</property>
					<property>metrics/Sw-sqft</property>
					<property>metrics/bw-ft</property>
					<property>aero/bi2vel</property>
					<property>velocities/r-aero-rad_sec</property>
					<value>-0.15</value>
				</product>
			</function>

			<function name="aero/moment/Yaw_rudder">
				<description>Yaw moment due to rudder</description>
				<product>
					<property>aero/qbar-psf</property>
					<property>metrics/Sw-sqft</property>
					<property>metrics/bw-ft</property>
					<property>fcs/rudder-pos-rad</property>
					<value>-0.1</value>
				</product>
			</function>

			<function name="aero/moment/Yaw_aileron">
				<description>Adverse yaw</description>
				<product>
					<property>aero/qbar-psf</property>
					<property>metrics/Sw-sqft</property>
        				<property>metrics/bw-ft</property>
        				<property>fcs/left-aileron-pos-rad</property>
        				<value>0</value>
				</product>
			</function>

		</axis>

	</aerodynamics>

	<external_reactions>
		<force name="pushback" frame="BODY">
			<location unit="IN">
				<x> 327.21 </x>
				<y>   0.00 </y>
				<z> -247.04 </z>
			</location>
			<direction>
				<x>1</x>
				<y>0</y>
				<z>0</z>
			</direction>
		</force>
	</external_reactions>

</fdm_config>
