<?xml version="1.0"?>

<!--
	File:     Aviadvigatel PS-90A1.xml
	Author:   Aero-Matic v 0.95, changes by JWocky for LÖRELEY TWEAK

	Inputs:
	name:           Aviadvigatel PS-90A1
	type:           high-bypass turbofan
	thrust:         35300 lb
	augmented?      no
	injected?       no
-->

<turbine_engine name="Aviadvigatel_PS90A1">
	<milthrust> 78000.0 </milthrust>  <!-- max take off thrust per stage4 -->
	<bypassratio>   3.0 </bypassratio>
	<tsfc>          0.045 </tsfc>
	<bleed>         0.01</bleed>
	<idlen1>       25.0 </idlen1>
	<idlen2>       50.0 </idlen2>
	<maxn1>       120.0 </maxn1>
	<maxn2>       120.0 </maxn2>
	<augmented> 0 </augmented>
	<injected>  0 </injected>

	<function name="IdleThrust">
		<table>
			<independentVar lookup="row">velocities/mach</independentVar>
			<independentVar lookup="column">atmosphere/density-altitude</independentVar>

			<tableData>
         -10000     0     10000   20000   30000   40000   50000   60000
     0.0  0.0530  0.0988  0.0528  0.0794  0.0999  0.1283  0.1567  0
     0.2  0.0600  0.0901  0.0335  0.0644  0.0897  0.1149  0.1442  0
     0.4  0.0140  0.9147  0.0020  0.0372  0.0695  0.0991  0.1303  0
     0.6  0.0     0.0     0.0     0.0     0.0376  0.0818  0.1173  0
     0.8  0.0     0.0     0.0     0.0     0.0574  0.0968  0.1000  0
     1.0  0.0     0.0     0.0     0.0     0.0     0.1552  0.0900  0
			</tableData>
		</table>
		</function>

	<function name="MilThrust">
		<table>
			<independentVar lookup="row">velocities/mach</independentVar>
			<independentVar lookup="column">atmosphere/density-altitude</independentVar>
    				<tableData>
          -10000       0   10000   20000   30000   40000   50000   60000
     0.0   1.2700  1.0200  0.7500  0.5340  0.3820  0.2510  0.1600  0
     0.2   1.1810  0.9540  0.7070  0.5060  0.3650  0.2410  0.1440  0
     0.4   1.1600  0.9410  0.7020  0.5060  0.3670  0.2430  0.1460  0
     0.6   1.1910  0.9710  0.7310  0.5320  0.3880  0.2580  0.1550  0
     0.8   1.2680  1.0400  0.7920  0.5820  0.4270  0.2850  0.1710  0
     1.0   1.3790  1.1400  0.8810  0.6510  0.4850  0.3250  0.1960  0
     1.2   1.4950  1.2500  0.9850  0.7440  0.5550  0.3740  0.2260  0
     1.4   1.6041  1.3600  1.0960  0.8450  0.6380  0.4340  0.2640  0
				</tableData>
		</table>
</function>
</turbine_engine>
